*HEADING
**
**
*NODE, NSET=INIT_NODES
       1,                     100.,                       0.,                     0
       2,                 99.01083,                1.607E-15,                 2.826198
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*Node
     238,                 93.07581,                 36.36364,                 19.78339
     239,                 88.12997,                 27.27273,                 33.91438
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*NodE
    4176,                 14.66907,                 3.030303,                 185.5091
    4177,                 -30.3292,                 57.57576,                 177.0826
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**
** MEMBRANE and STRUCTURAL ELEMENTS
**
*element, TYPE=S4, ELSET=P1;ELSET_MAT
      92,      109,      108,      119,      120
     103,      120,      119,      132,      133
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*NoDe
    4778,                 5.946643,                 63.63636,                 187.4228
    4779,                 22.89025,                 51.51515,                 182.0227
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*ELEMENT, TYPE=S3R, ELSET=P1;ELSET_MAT
    2176,     2319,     2294,     2320
    2200,     2344,     2320,     2345
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*ELEMENT, TYPE=S4, ELSET=P2;ELSET_MAT
       1,        4,        1,        2,        3
       2,        3,        2,        5,        6
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*ELEMENT, TYPE=S3R, ELSET=P2;ELSET_MAT
    1816,     1906,     1908,     1907
    1817,     1907,     1910,     1909
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**
**
**
**
**
**
**
** SECTION DATA
**
*SHELL SECTION, ELSET=P1;ELSET_MAT, MATERIAL=M1;MAT, DENSITY=0.
                     0.8,
*SHELL SECTION, ELSET=P2;ELSET_MAT, MATERIAL=M1;MAT, DENSITY=0.
                     0.8,
**
** MATERIALS
**
**
**M1;MAT
**
*MATERIAL, NAME=M1;MAT
*DENSITY
                      1.,
*ELASTIC, TYPE=ISOTROPIC
                  40000.,                      0.3
**
**
**
**
** SETS
**
*NSET, NSET=Start_Nodes
       1,        2,        3,        4,        5,        6
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*NSET, NSET=LOAD_SET
    4075,     4076,     4098,     4121,     4145,     4170
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*NSET, NSET=DOF_3
       1,        4,        8,       15,       22,       32
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*NSET, NSET=DOF_2
       1,      974,     1905,     2400
*NSET, NSET=DOF_1
       1,      974
*NSET, NSET=SET4
    1723,     1728,     1733,     1738,     1742,     1747,     1751,     1752,     1756
**
** STEPS
**
**
** STEP 1
**
*STEP, NAME=STEP-1
*STATIC
**
** CLOAD
**
*CLOAD
LOAD_SET,        3,                      -1.
**
** BOUNDARY
**
*BOUNDARY, TYPE=DISPLACEMENT
DOF_3,        3,         ,                       0.
DOF_2,        2,         ,                       0.
DOF_1,        1,         ,                       0.
*NODE PRINT
U,
*END STEP
